OpenVSP model (file version 5), 6 components.
Geometry view with OpenVSP parameter names; values to 6 digits, angles in degrees, lengths in the model's unit.
Overall bounding box: X_Min=0 X_Len=27.8926 Y_Min=-16.3429 Y_Len=32.6858 Z_Min=-1.3345 Z_Len=6.87417

Wing "HTail"
  location (X Y Z) 25.1051 0 4.73428, rotation 0 0 0
  symmetric about XZ
  bounding box size 2.32668 8.53713 0.232803
  totals: TotalSpan=8.43422 TotalProjectedSpan=8.43422 TotalChord=1.68684 TotalArea=14.2272 TotalAR=5.00001 MAC=1.76774
  root: chord 2.32668, twist 0, NACA 4-series Camber=0 CamberLoc=0.1 ThickChord=0.1
  sections:
    n  Span     Root_Chord  Tip_Chord  Area     Sweep  Sweep_Location  Dihedral  Twist  Twist_Location  tip airfoil
    1  4.21711  2.32668     1.047      7.11359  5      0.25            0         0      0               as above

Wing "VTail"
  location (X Y Z) 19.56 0 1.3345, rotation 90 0 0
  bounding box size 8.33258 0.740521 4.20517
  totals: TotalSpan=4.20517 TotalProjectedSpan=4.20517 TotalChord=4.26273 TotalArea=15.5766 TotalAR=1.13526 MAC=4.12367
  root: chord 7.40092, twist 0, NACA 4-series Camber=0 CamberLoc=0.1 ThickChord=0.1
  sections:
    n  Span     Root_Chord  Tip_Chord  Area     Sweep    Sweep_Location  Dihedral  Twist  Twist_Location  tip airfoil
    1  1.13443  7.40092     3.5507     6.21193  12.4922  1               0         0      0               as above
    2  3.07074  3.5507      2.5486     9.36468  25       0.25            0         0      0               as above

Wing "Wing"
  location (X Y Z) 10.5947 0 1.3345, rotation 0 0 0
  symmetric about XZ
  bounding box size 2.86977 32.6858 0.551869
  totals: TotalSpan=32.4663 TotalProjectedSpan=32.4663 TotalChord=2.15415 TotalArea=69.9374 TotalAR=15.0715 MAC=2.22094
  root: chord 2.86869, twist 0, NACA 4-series Camber=0.02 CamberLoc=0.3 ThickChord=0.192311
  sections:
    n  Span     Root_Chord  Tip_Chord  Area     Sweep     Sweep_Location  Dihedral  Twist  Twist_Location  tip airfoil
    1  8.11665  2.86869     2.09382    20.1395  -5.41702  1               0         0      0               NACA 4-series Camber=0.02 CamberLoc=0.3 ThickChord=0.141028
    2  8.11649  2.09382     1.56029    14.8292  1.81047   0               0         0      0               as above

Fuselage "Fuselage"
  location (X Y Z) 0 0 0, rotation 0 0 0
  bounding box size 27.166 2.669 2.669
  Design: Length=27.166
  cross sections:
    n  XLocPercent  YLocPercent  ZLocPercent  shape
    0  0            0            -0.0253884   circle Circle_Diameter=0
    1  0.021074     0            -0.0228484   circle Circle_Diameter=1.13433
    2  0.039466     0            -0.0204042   circle Circle_Diameter=1.48663
    3  0.063861     0            -0.00834867  circle Circle_Diameter=2.12452
    4  0.34902      0            -0.00281602  circle Circle_Diameter=2.42879
    5  0.562935     0            0            circle Circle_Diameter=2.669
    6  0.675782     0            0            as above
    7  0.837891     0            0.0111511    circle Circle_Diameter=2.06314
    8  0.984155     0            0.032913     circle Circle_Diameter=0.88077
    9  1            0            0.032913     circle Circle_Diameter=0

Blank "Engine 2"
  location (X Y Z) 10.1622 4.1045 1.01361, rotation 0 0 0
  mass: Density=1 Shell_Flag=0 Mass_Area=1 Mass_Prior=0 PointMass=1 CGx=0 CGy=0 CGz=0 Ixx=0 Iyy=0 Izz=0 Ixy=0 Ixz=0 Iyz=0

Blank "Engine 1"
  location (X Y Z) 10.1622 -4.1045 1.01361, rotation 0 0 0
  mass: Density=1 Shell_Flag=0 Mass_Area=1 Mass_Prior=0 PointMass=1 CGx=0 CGy=0 CGz=0 Ixx=0 Iyy=0 Izz=0 Ixy=0 Ixz=0 Iyz=0
